*Heading
** Job name: Job-Global-G2L1-forspecimen1 Model name: 2-15-Global-G2L1-forspecimen1
** Generated by: Abaqus/CAE 2020
*Preprint, echo=NO, model=NO, history=NO, contact=NO
**
** PARTS
**
*Part, name="Beam G2 W36x302 AccessHoleImproved RBS1"
*Node
      1,   7.67500019,  -5.44000006,   153.636978
      2,        8.625,  -5.44000006,   153.636978
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*Element, type=C3D20
 1,    1,    2,  173,  174,  181,  189, 1413, 1409, 4322, 4321, 4320, 4319, 4323, 4324, 4325,
    4326, 4328, 4327, 4329, 4330
 2,  174,  173,    3,    4, 1409, 1413,  188,  180, 4320, 4333, 4332, 4331, 4325, 4334, 4335,
    4336, 4330, 4329, 4337, 4338
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*Element, type=C3D8R
651,  656, 2186, 3923, 2000,   83,  587, 1997,  594
652, 2186,  688, 2093, 3923,  587,   84,  588, 1997
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*Element, type=C3D15
2395,  104,  105,  141,  109,  110,  142, 7340, 7944, 7943, 7343, 7945, 7946, 7346, 7345, 7947
2396,  120,  126,  143,  118,  124,  144, 7539, 7949, 7948, 7534, 7950, 7951, 7463, 7541, 7952
*Nset, nset=_PickedSet36, internal, generate
    1,  8241,     1
*Elset, elset=_PickedSet36, internal, generate
    1,  2452,     1
** Section: Beam
*Solid Section, elset=_PickedSet36, material=BeamA992
,
*End Part
**
*Part, name="Column 36x24x2-backup"
*Node
      1,          -2.,          14.,          90.
      2,          -2.,          12.,          90.
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*Element, type=C3D8R
 1,  134,  168, 1278, 1261,    1,    2,   97,   98
 2, 1261, 1278,  135,  101,   98,   97,    3,    4
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*Element, type=C3D20R
 811,   25,  321, 1431,  339,  639, 2157, 4426, 2146, 4735, 4734, 4733, 4732, 4736, 4737, 4738,
      4739, 4741, 4740, 4742, 4743
 812,  321,  322, 1432, 1431, 2157, 2158, 4427, 4426, 4746, 4745, 4744, 4734, 4747, 4748, 4749,
      4737, 4740, 4750, 4751, 4742
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*Nset, nset=_PickedSet24, internal, generate
    1,  5803,     1
*Elset, elset=_PickedSet24, internal, generate
    1,  2632,     1
** Section: Column
*Solid Section, elset=_PickedSet24, material=ColumnA572
,
*End Part
**
*Part, name="continuity plate"
*Node
      1,         -30.,        19.25,           0.
      2,         -30.,        19.25,   1.67999995
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*Element, type=C3D8R
 1,  20,  24,   7,   1,  50,  54,  37,  31
 2,  24,   8,   2,   7,  54,  38,  32,  37
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*Nset, nset=_PickedSet10, internal, generate
   1,  180,    1
*Elset, elset=_PickedSet10, internal, generate
  1,  90,   1
** Section: ContinuityPlate
*Solid Section, elset=_PickedSet10, material=ContinuityPlateA572
,
*End Part
**
**
** ASSEMBLY
**
*Assembly, name=Assembly
**
*Instance, name="Beam G2 W36x302 AccessHoleImproved RBS1-1", part="Beam G2 W36x302 AccessHoleImproved RBS1"
        162.,       104.47, -8.14999999999998
        162.,       104.47, -8.14999999999998,         162., 103.469999987312, -8.14999999999998, 89.9999992730282
*End Instance
**
*Instance, name="Column 36x24x2-backup-1", part="Column 36x24x2-backup"
          0.,         230.,          -2.
          0.,         230.,          -2., 1.00000001268805,         230.,          -2., 89.9999992730282
*End Instance
**
*Instance, name="continuity plate-1", part="continuity plate"
    -25.2505,        97.35,          40.
    -25.2505,        97.35,          40., -25.8278502691896, 96.7726497308104, 39.4226497308104,         120.
*End Instance
**
*Instance, name="continuity plate-2", part="continuity plate"
    -25.2505,       132.97,          40.
    -25.2505,       132.97,          40., -25.8278502691896, 132.39264973081, 39.4226497308104,         120.
*End Instance
**
*Node
      1,         162.,         116.,           0.
*Node
      2,         -18.,           2.,           0.
*Nset, nset="BC Bottom left", instance="Column 36x24x2-backup-1"
  53,  54,  55,  64, 839, 840, 841, 842
*Elset, elset="BC Bottom left", instance="Column 36x24x2-backup-1"
 1572, 1658, 1659, 1660, 1661, 1662, 2256, 2488, 2504, 2505, 2506, 2507, 2508, 2629
*Nset, nset="BC Top", instance="Column 36x24x2-backup-1"
  15,  16,  19,  23, 249, 250, 251, 252
*Elset, elset="BC Top", instance="Column 36x24x2-backup-1"
   54,  140,  141,  142,  143,  144,  162, 2257, 2261, 2262, 2263, 2264, 2265, 2281
*Nset, nset="Column bottom", instance="Column 36x24x2-backup-1"
   81,   82,   83,   84,   85,   86
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*Elset, elset="Column bottom", instance="Column 36x24x2-backup-1"
 2445, 2446, 2477, 2478, 2479, 2480
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*Nset, nset=m_Set-5
 2,
*Nset, nset=_PickedSet33, internal
 2,
*Nset, nset=_PickedSet34, internal
 1,
*Nset, nset=_PickedSet274, internal
 1,
*Nset, nset=_PickedSet371, internal, instance="Beam G2 W36x302 AccessHoleImproved RBS1-1"
   83,   84,   85,   86,   87,   88
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*Elset, elset=_PickedSet371, internal, instance="Beam G2 W36x302 AccessHoleImproved RBS1-1"
  651,  652,  653,  654,  655,  656
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*Nset, nset=_PickedSet393, internal, instance="Column 36x24x2-backup-1"
   81,   82,   83,   84,   85,   86
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*Elset, elset=_PickedSet393, internal, instance="Column 36x24x2-backup-1"
 2445, 2446, 2477, 2478, 2479, 2480
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*Elset, elset="_Column face_S3", internal, instance="Column 36x24x2-backup-1"
  811,  812,  813,  814,  815,  816
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*Surface, type=ELEMENT, name="Column face"
"_Column face_S3", S3
*Elset, elset="_Column inner_S4", internal, instance="Column 36x24x2-backup-1", generate
 1051,  1146,     1
*Elset, elset="_Column inner_S3", internal, instance="Column 36x24x2-backup-1", generate
 739,  798,    1
*Elset, elset="_Column inner_S2", internal, instance="Column 36x24x2-backup-1", generate
 1315,  1410,     1
*Elset, elset="_Column inner_S5", internal, instance="Column 36x24x2-backup-1"
  821,  822,  823,  824,  825,  826
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*Surface, type=ELEMENT, name="Column inner"
"_Column inner_S4", S4
"_Column inner_S3", S3
"_Column inner_S2", S2
"_Column inner_S5", S5
*Elset, elset="_SB (2Column)_S1", internal, instance="continuity plate-1", generate
  1,  18,   1
*Elset, elset="_SB (2Column)_S1", internal, instance="continuity plate-2", generate
  1,  18,   1
*Elset, elset="_SB (2Column)_S3", internal, instance="continuity plate-1"
 13, 14, 17, 18, 31, 32
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*Elset, elset="_SB (2Column)_S3", internal, instance="continuity plate-2"
 13, 14, 17, 18, 31, 32
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*Elset, elset="_SB (2Column)_S2", internal, instance="continuity plate-1", generate
 73,  90,   1
*Elset, elset="_SB (2Column)_S2", internal, instance="continuity plate-2", generate
 73,  90,   1
*Surface, type=ELEMENT, name="SB (2Column)"
"_SB (2Column)_S1", S1
"_SB (2Column)_S3", S3
"_SB (2Column)_S2", S2
*Elset, elset="_beam weld_S3", internal, instance="Beam G2 W36x302 AccessHoleImproved RBS1-1"
 2253, 2254, 2257, 2258, 2261, 2262
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*Elset, elset="_beam weld_S6", internal, instance="Beam G2 W36x302 AccessHoleImproved RBS1-1"
 2313, 2314, 2317, 2318, 2321, 2322, 2325, 2326, 2345, 2346, 2349, 2350, 2353, 2354, 2357, 2358
*Elset, elset="_beam weld_S5", internal, instance="Beam G2 W36x302 AccessHoleImproved RBS1-1", generate
 2411,  2433,     2
*Elset, elset="_beam weld_S2", internal, instance="Beam G2 W36x302 AccessHoleImproved RBS1-1"
 2408, 2409
*Surface, type=ELEMENT, name="beam weld"
"_beam weld_S3", S3
"_beam weld_S6", S6
"_beam weld_S2", S2
"_beam weld_S5", S5
*Surface, type=NODE, name=_PickedSet393_CNS_, internal
_PickedSet393, 1.
*Elset, elset="__MixOrder0_Beam G2 W36x302 AccessHoleImproved RBS1-1_M_S1", internal, instance="Beam G2 W36x302 AccessHoleImproved RBS1-1"
 969, 970
*Surface, type=ELEMENT, name="_MixOrder0_Beam G2 W36x302 AccessHoleImproved RBS1-1_M", internal
"__MixOrder0_Beam G2 W36x302 AccessHoleImproved RBS1-1_M_S1", S1
*Elset, elset="__MixOrder0_Beam G2 W36x302 AccessHoleImproved RBS1-1_S_S2", internal, instance="Beam G2 W36x302 AccessHoleImproved RBS1-1"
 241, 242
*Surface, type=ELEMENT, name="_MixOrder0_Beam G2 W36x302 AccessHoleImproved RBS1-1_S", internal
"__MixOrder0_Beam G2 W36x302 AccessHoleImproved RBS1-1_S_S2", S2
*Tie, name="_MixOrder0_Beam G2 W36x302 AccessHoleImproved RBS1-1", adjust=no
"_MixOrder0_Beam G2 W36x302 AccessHoleImproved RBS1-1_S", "_MixOrder0_Beam G2 W36x302 AccessHoleImproved RBS1-1_M"
*Elset, elset="__MixOrder1_Beam G2 W36x302 AccessHoleImproved RBS1-1_M_S1", internal, instance="Beam G2 W36x302 AccessHoleImproved RBS1-1", generate
 1219,  1226,     1
*Surface, type=ELEMENT, name="_MixOrder1_Beam G2 W36x302 AccessHoleImproved RBS1-1_M", internal
"__MixOrder1_Beam G2 W36x302 AccessHoleImproved RBS1-1_M_S1", S1
*Elset, elset="__MixOrder1_Beam G2 W36x302 AccessHoleImproved RBS1-1_S_S2", internal, instance="Beam G2 W36x302 AccessHoleImproved RBS1-1", generate
 251,  258,    1
*Surface, type=ELEMENT, name="_MixOrder1_Beam G2 W36x302 AccessHoleImproved RBS1-1_S", internal
"__MixOrder1_Beam G2 W36x302 AccessHoleImproved RBS1-1_S_S2", S2
*Tie, name="_MixOrder1_Beam G2 W36x302 AccessHoleImproved RBS1-1", adjust=no
"_MixOrder1_Beam G2 W36x302 AccessHoleImproved RBS1-1_S", "_MixOrder1_Beam G2 W36x302 AccessHoleImproved RBS1-1_M"
*Elset, elset="__MixOrder2_Beam G2 W36x302 AccessHoleImproved RBS1-1_M_S1", internal, instance="Beam G2 W36x302 AccessHoleImproved RBS1-1", generate
 1923,  1930,     1
*Surface, type=ELEMENT, name="_MixOrder2_Beam G2 W36x302 AccessHoleImproved RBS1-1_M", internal
"__MixOrder2_Beam G2 W36x302 AccessHoleImproved RBS1-1_M_S1", S1
*Elset, elset="__MixOrder2_Beam G2 W36x302 AccessHoleImproved RBS1-1_S_S2", internal, instance="Beam G2 W36x302 AccessHoleImproved RBS1-1", generate
 291,  298,    1
*Surface, type=ELEMENT, name="_MixOrder2_Beam G2 W36x302 AccessHoleImproved RBS1-1_S", internal
"__MixOrder2_Beam G2 W36x302 AccessHoleImproved RBS1-1_S_S2", S2
*Tie, name="_MixOrder2_Beam G2 W36x302 AccessHoleImproved RBS1-1", adjust=no
"_MixOrder2_Beam G2 W36x302 AccessHoleImproved RBS1-1_S", "_MixOrder2_Beam G2 W36x302 AccessHoleImproved RBS1-1_M"
*Elset, elset="__MixOrder3_Beam G2 W36x302 AccessHoleImproved RBS1-1_M_S1", internal, instance="Beam G2 W36x302 AccessHoleImproved RBS1-1", generate
 2179,  2186,     1
*Surface, type=ELEMENT, name="_MixOrder3_Beam G2 W36x302 AccessHoleImproved RBS1-1_M", internal
"__MixOrder3_Beam G2 W36x302 AccessHoleImproved RBS1-1_M_S1", S1
*Elset, elset="__MixOrder3_Beam G2 W36x302 AccessHoleImproved RBS1-1_S_S2", internal, instance="Beam G2 W36x302 AccessHoleImproved RBS1-1", generate
 331,  338,    1
*Surface, type=ELEMENT, name="_MixOrder3_Beam G2 W36x302 AccessHoleImproved RBS1-1_S", internal
"__MixOrder3_Beam G2 W36x302 AccessHoleImproved RBS1-1_S_S2", S2
*Tie, name="_MixOrder3_Beam G2 W36x302 AccessHoleImproved RBS1-1", adjust=no
"_MixOrder3_Beam G2 W36x302 AccessHoleImproved RBS1-1_S", "_MixOrder3_Beam G2 W36x302 AccessHoleImproved RBS1-1_M"
*Elset, elset="__MixOrder4_Beam G2 W36x302 AccessHoleImproved RBS1-1_M_S1", internal, instance="Beam G2 W36x302 AccessHoleImproved RBS1-1"
 1673, 1674
*Surface, type=ELEMENT, name="_MixOrder4_Beam G2 W36x302 AccessHoleImproved RBS1-1_M", internal
"__MixOrder4_Beam G2 W36x302 AccessHoleImproved RBS1-1_M_S1", S1
*Elset, elset="__MixOrder4_Beam G2 W36x302 AccessHoleImproved RBS1-1_S_S2", internal, instance="Beam G2 W36x302 AccessHoleImproved RBS1-1"
 371, 372
*Surface, type=ELEMENT, name="_MixOrder4_Beam G2 W36x302 AccessHoleImproved RBS1-1_S", internal
"__MixOrder4_Beam G2 W36x302 AccessHoleImproved RBS1-1_S_S2", S2
*Tie, name="_MixOrder4_Beam G2 W36x302 AccessHoleImproved RBS1-1", adjust=no
"_MixOrder4_Beam G2 W36x302 AccessHoleImproved RBS1-1_S", "_MixOrder4_Beam G2 W36x302 AccessHoleImproved RBS1-1_M"
*Elset, elset="__MixOrder5_Beam G2 W36x302 AccessHoleImproved RBS1-1_M_S1", internal, instance="Beam G2 W36x302 AccessHoleImproved RBS1-1", generate
 1601,  1610,     1
*Surface, type=ELEMENT, name="_MixOrder5_Beam G2 W36x302 AccessHoleImproved RBS1-1_M", internal
"__MixOrder5_Beam G2 W36x302 AccessHoleImproved RBS1-1_M_S1", S1
*Elset, elset="__MixOrder5_Beam G2 W36x302 AccessHoleImproved RBS1-1_S_S2", internal, instance="Beam G2 W36x302 AccessHoleImproved RBS1-1", generate
 381,  390,    1
*Surface, type=ELEMENT, name="_MixOrder5_Beam G2 W36x302 AccessHoleImproved RBS1-1_S", internal
"__MixOrder5_Beam G2 W36x302 AccessHoleImproved RBS1-1_S_S2", S2
*Tie, name="_MixOrder5_Beam G2 W36x302 AccessHoleImproved RBS1-1", adjust=no
"_MixOrder5_Beam G2 W36x302 AccessHoleImproved RBS1-1_S", "_MixOrder5_Beam G2 W36x302 AccessHoleImproved RBS1-1_M"
*Elset, elset="__MixOrder6_Beam G2 W36x302 AccessHoleImproved RBS1-1_M_S1", internal, instance="Beam G2 W36x302 AccessHoleImproved RBS1-1"
 1289, 1290
*Surface, type=ELEMENT, name="_MixOrder6_Beam G2 W36x302 AccessHoleImproved RBS1-1_M", internal
"__MixOrder6_Beam G2 W36x302 AccessHoleImproved RBS1-1_M_S1", S1
*Elset, elset="__MixOrder6_Beam G2 W36x302 AccessHoleImproved RBS1-1_S_S2", internal, instance="Beam G2 W36x302 AccessHoleImproved RBS1-1"
 431, 432
*Surface, type=ELEMENT, name="_MixOrder6_Beam G2 W36x302 AccessHoleImproved RBS1-1_S", internal
"__MixOrder6_Beam G2 W36x302 AccessHoleImproved RBS1-1_S_S2", S2
*Tie, name="_MixOrder6_Beam G2 W36x302 AccessHoleImproved RBS1-1", adjust=no
"_MixOrder6_Beam G2 W36x302 AccessHoleImproved RBS1-1_S", "_MixOrder6_Beam G2 W36x302 AccessHoleImproved RBS1-1_M"
*Elset, elset="__MixOrder7_Beam G2 W36x302 AccessHoleImproved RBS1-1_M_S1", internal, instance="Beam G2 W36x302 AccessHoleImproved RBS1-1", generate
 899,  906,    1
*Surface, type=ELEMENT, name="_MixOrder7_Beam G2 W36x302 AccessHoleImproved RBS1-1_M", internal
"__MixOrder7_Beam G2 W36x302 AccessHoleImproved RBS1-1_M_S1", S1
*Elset, elset="__MixOrder7_Beam G2 W36x302 AccessHoleImproved RBS1-1_S_S2", internal, instance="Beam G2 W36x302 AccessHoleImproved RBS1-1", generate
 441,  448,    1
*Surface, type=ELEMENT, name="_MixOrder7_Beam G2 W36x302 AccessHoleImproved RBS1-1_S", internal
"__MixOrder7_Beam G2 W36x302 AccessHoleImproved RBS1-1_S_S2", S2
*Tie, name="_MixOrder7_Beam G2 W36x302 AccessHoleImproved RBS1-1", adjust=no
"_MixOrder7_Beam G2 W36x302 AccessHoleImproved RBS1-1_S", "_MixOrder7_Beam G2 W36x302 AccessHoleImproved RBS1-1_M"
*Elset, elset="__MixOrder8_Beam G2 W36x302 AccessHoleImproved RBS1-1_M_S3", internal, instance="Beam G2 W36x302 AccessHoleImproved RBS1-1"
 2187, 2188
*Surface, type=ELEMENT, name="_MixOrder8_Beam G2 W36x302 AccessHoleImproved RBS1-1_M", internal
"__MixOrder8_Beam G2 W36x302 AccessHoleImproved RBS1-1_M_S3", S3
*Elset, elset="__MixOrder8_Beam G2 W36x302 AccessHoleImproved RBS1-1_S_S5", internal, instance="Beam G2 W36x302 AccessHoleImproved RBS1-1"
 485, 490
*Surface, type=ELEMENT, name="_MixOrder8_Beam G2 W36x302 AccessHoleImproved RBS1-1_S", internal
"__MixOrder8_Beam G2 W36x302 AccessHoleImproved RBS1-1_S_S5", S5
*Tie, name="_MixOrder8_Beam G2 W36x302 AccessHoleImproved RBS1-1", adjust=no
"_MixOrder8_Beam G2 W36x302 AccessHoleImproved RBS1-1_S", "_MixOrder8_Beam G2 W36x302 AccessHoleImproved RBS1-1_M"
*Elset, elset="__MixOrder0_Column 36x24x2-backup-1_M_S2", internal, instance="Column 36x24x2-backup-1", generate
 163,  182,    1
*Surface, type=ELEMENT, name="_MixOrder0_Column 36x24x2-backup-1_M", internal
"__MixOrder0_Column 36x24x2-backup-1_M_S2", S2
*Elset, elset="__MixOrder0_Column 36x24x2-backup-1_S_S1", internal, instance="Column 36x24x2-backup-1", generate
 811,  830,    1
*Surface, type=ELEMENT, name="_MixOrder0_Column 36x24x2-backup-1_S", internal
"__MixOrder0_Column 36x24x2-backup-1_S_S1", S1
*Tie, name="_MixOrder0_Column 36x24x2-backup-1", adjust=no
"_MixOrder0_Column 36x24x2-backup-1_S", "_MixOrder0_Column 36x24x2-backup-1_M"
*Elset, elset="__MixOrder1_Column 36x24x2-backup-1_M_S4", internal, instance="Column 36x24x2-backup-1", generate
 703,  726,    1
*Surface, type=ELEMENT, name="_MixOrder1_Column 36x24x2-backup-1_M", internal
"__MixOrder1_Column 36x24x2-backup-1_M_S4", S4
*Elset, elset="__MixOrder1_Column 36x24x2-backup-1_S_S4", internal, instance="Column 36x24x2-backup-1", generate
  820,  1050,    10
*Surface, type=ELEMENT, name="_MixOrder1_Column 36x24x2-backup-1_S", internal
"__MixOrder1_Column 36x24x2-backup-1_S_S4", S4
*Tie, name="_MixOrder1_Column 36x24x2-backup-1", adjust=no
"_MixOrder1_Column 36x24x2-backup-1_S", "_MixOrder1_Column 36x24x2-backup-1_M"
*Elset, elset="__MixOrder2_Column 36x24x2-backup-1_M_S1", internal, instance="Column 36x24x2-backup-1", generate
 1843,  1862,     1
*Surface, type=ELEMENT, name="_MixOrder2_Column 36x24x2-backup-1_M", internal
"__MixOrder2_Column 36x24x2-backup-1_M_S1", S1
*Elset, elset="__MixOrder2_Column 36x24x2-backup-1_S_S2", internal, instance="Column 36x24x2-backup-1", generate
 1031,  1050,     1
*Surface, type=ELEMENT, name="_MixOrder2_Column 36x24x2-backup-1_S", internal
"__MixOrder2_Column 36x24x2-backup-1_S_S2", S2
*Tie, name="_MixOrder2_Column 36x24x2-backup-1", adjust=no
"_MixOrder2_Column 36x24x2-backup-1_S", "_MixOrder2_Column 36x24x2-backup-1_M"
*Elset, elset="__MixOrder3_Column 36x24x2-backup-1_M_S6", internal, instance="Column 36x24x2-backup-1", generate
 1147,  1170,     1
*Surface, type=ELEMENT, name="_MixOrder3_Column 36x24x2-backup-1_M", internal
"__MixOrder3_Column 36x24x2-backup-1_M_S6", S6
*Elset, elset="__MixOrder3_Column 36x24x2-backup-1_S_S6", internal, instance="Column 36x24x2-backup-1", generate
  811,  1041,    10
*Surface, type=ELEMENT, name="_MixOrder3_Column 36x24x2-backup-1_S", internal
"__MixOrder3_Column 36x24x2-backup-1_S_S6", S6
*Tie, name="_MixOrder3_Column 36x24x2-backup-1", adjust=no
"_MixOrder3_Column 36x24x2-backup-1_S", "_MixOrder3_Column 36x24x2-backup-1_M"
** Constraint: Beam pin end
*Rigid Body, ref node=_PickedSet274, pin nset=_PickedSet371
** Constraint: Column beam weld
*Tie, name="Column beam weld", adjust=yes
"beam weld", "Column face"
** Constraint: Column bottom
*MPC
BEAM, _PickedSet393, m_Set-5
** Constraint: Column continuity plate weld
*Tie, name="Column continuity plate weld", adjust=yes
"SB (2Column)", "Column inner"
*End Assembly
*Amplitude, name="Cyclic loading"
             0.,              0.,              1.,          0.0675,              2.,           0.135,              3.,          0.2025
             4.,            0.27,              5.,          0.3375,              6.,           0.405,              7.,          0.4725
             8.,            0.54,              9.,          0.6075,             10.,           0.675,             11.,            0.54
            12.,           0.405,             13.,            0.27,             14.,           0.135,             15.,              0.
            16.,          -0.135,             17.,           -0.27,             18.,          -0.405,             19.,           -0.54
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           680.,           -10.8
*Amplitude, name="Cyclic loading2"
             0.,              0.,              1.,           0.675,              2.,          -0.675,              3.,           0.675
             4.,          -0.675,              5.,           0.675,              6.,          -0.675,              7.,           0.675
             8.,          -0.675,              9.,           0.675,             10.,          -0.675,             11.,           0.675
            12.,          -0.675,             13.,             0.9,             14.,            -0.9,             15.,             0.9
            16.,            -0.9,             17.,             0.9,             18.,            -0.9,             19.,             0.9
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           216.,           -10.8
*Amplitude, name="Monotonic Loading"
             0.,              0.,              1.,            2.16,              2.,            4.32,              3.,            6.48
             4.,            8.64,              5.,            10.8
**
** MATERIALS
**
*Material, name=BeamA992
*Elastic
29000., 0.3
*Plastic, hardening=COMBINED, datatype=PARAMETERS, number backstresses=1
 59.5,490., 20.
*Cyclic Hardening, parameters
 59.5,13.,12.
*Material, name=ColumnA572
*Elastic
29000., 0.3
*Plastic, hardening=COMBINED, datatype=PARAMETERS, number backstresses=1
 59.8, 481.5,  16.9
*Cyclic Hardening, parameters
 59.8, 18.9, 7.69
*Material, name=ContinuityPlateA572
*Elastic
29000., 0.3
*Plastic, hardening=COMBINED, datatype=PARAMETERS, number backstresses=1
62., 481.5,  16.9
*Cyclic Hardening, parameters
62., 18.9, 7.69
*Material, name=HAZ
*Elastic
29000., 0.3
*Plastic, hardening=COMBINED, datatype=PARAMETERS, number backstresses=1
 70.85, 310.6,  11.5
*Cyclic Hardening, parameters
 70.85, 14.9,   5.
*Material, name=PlateBetweenCPandSB
*Elastic
29000., 0.3
*Plastic, hardening=COMBINED, datatype=PARAMETERS, number backstresses=1
62., 481.5,  16.9
*Cyclic Hardening, parameters
62., 18.9, 7.69
*Material, name=StrengthenBar
*Elastic
29000., 0.3
*Plastic, hardening=COMBINED, datatype=PARAMETERS, number backstresses=1
62., 481.5,  16.9
*Cyclic Hardening, parameters
62., 18.9, 7.69
*Material, name=Welding
*Elastic
29000., 0.3
*Plastic, hardening=COMBINED, datatype=PARAMETERS, number backstresses=1
 67.35, 210.4,    8.
*Cyclic Hardening, parameters
 67.35, 14.9,   5.
*Material, name=Welding-NotESW
*Elastic
29000., 0.3
*Plastic, hardening=COMBINED, datatype=PARAMETERS, number backstresses=1
62., 481.5,  16.9
*Cyclic Hardening, parameters
62., 18.9, 7.69
**
** BOUNDARY CONDITIONS
**
** Name: BC-Column bottom Type: 変位/回転
*Boundary
_PickedSet33, 1, 1
_PickedSet33, 2, 2
_PickedSet33, 3, 3
_PickedSet33, 4, 4
_PickedSet33, 5, 5
** ----------------------------------------------------------------
*Imperfection, file=Job-Buckling-W36, step=1, NSET=BeamFlange
**136, 0.123841
136, 0.123841
**
** STEP: Loading
**
*Step, name=Loading, nlgeom=YES, inc=20000
*Static, stabilize=0.0002, allsdtol=0.05, continue=NO
0.001, 216., 6.8e-07, 0.1
**
** BOUNDARY CONDITIONS
**
** Name: BC-Bottom left Type: 変位/回転
*Boundary
"BC Bottom left", 1, 1
"BC Bottom left", 3, 3
** Name: BC-Top Type: 変位/回転
*Boundary
"BC Top", 1, 1
"BC Top", 3, 3
** Name: Load disp Type: 変位/回転
*Boundary, amplitude="Cyclic loading2"
_PickedSet34, 1, 1
_PickedSet34, 2, 2, 1.
_PickedSet34, 3, 3
_PickedSet34, 4, 4
_PickedSet34, 5, 5
**
** OUTPUT REQUESTS
**
*Restart, write, frequency=0
**
** FIELD OUTPUT: F-Output-1
**
*Output, field
*Node Output
RF, UT
*Element Output, directions=YES
PEEQ,
**
** HISTORY OUTPUT: H-Output-1
**
*Output, history, variable=PRESELECT
*End Step
