*Heading
** Job name: Job-Buckling-W36 Model name: 1-1-Buckling-W36-WUF
** Generated by: Abaqus/CAE 2020
*Preprint, echo=NO, model=NO, history=NO, contact=NO
**
** PARTS
**
*Part, name="Beam W36x302"
*Node
      1,        8.625,  -5.44000006,   138.622223
      2,        8.625,  -7.11999989,   138.622223
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*Element, type=C3D8R
 1,  182, 1339, 1343,  175,    1,  171,  172,    4
 2, 1339,  187,  186, 1343,  171,    2,    3,  172
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*Element, type=C3D6
2259, 131, 109, 141, 135, 126, 142
2260, 120, 106, 143, 117, 104, 144
*Nset, nset=_PickedSet4, internal, generate
    1,  4058,     1
*Elset, elset=_PickedSet4, internal, generate
    1,  2302,     1
** Section: Beam
*Solid Section, elset=_PickedSet4, material=BeamA992
,
*End Part
**
*Part, name="Column 36x24x2"
*Node
      1,         -36.,          -8.,          18.
      2,         -34.,          -8.,          18.
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*Element, type=C3D8R
 1, 158, 206, 205,  65,   1,   2,   3,   4
 2, 157, 207, 204,  66, 158, 206, 205,  65
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*Nset, nset=_PickedSet2, internal, generate
    1,  3420,     1
*Elset, elset=_PickedSet2, internal, generate
    1,  1680,     1
** Section: Column
*Solid Section, elset=_PickedSet2, material=ColumnA572
,
*End Part
**
*Part, name=RHSpart
*Node
      1,         -15.,   25.2000008,           0.
      2,          15.,   25.2000008,           0.
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*Element, type=C3D8R
 1, 18, 19, 21, 24, 47, 48, 50, 53
 2, 23, 22, 11, 12, 52, 51, 40, 41
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*Nset, nset=_PickedSet2, internal, generate
  1,  87,   1
*Elset, elset=_PickedSet2, internal, generate
  1,  36,   1
** Section: Beam
*Solid Section, elset=_PickedSet2, material=BeamA992
,
*End Part
**
*Part, name="Strengthen bar"
*Node
      1,         3.75,          2.5,          20.
      2,         3.75,           1.,          20.
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*Element, type=C3D8R
1, 13, 14, 16, 15,  1,  2,  4,  3
2, 15, 16, 18, 17,  3,  4,  6,  5
3, 17, 18, 20, 19,  5,  6,  8,  7
4, 19, 20, 22, 21,  7,  8, 10,  9
5, 21, 22, 24, 23,  9, 10, 12, 11
*Nset, nset=_PickedSet2, internal, generate
  1,  24,   1
*Elset, elset=_PickedSet2, internal, generate
 1,  5,  1
** Section: StrengthenBar
*Solid Section, elset=_PickedSet2, material=StrengthenBar
,
*End Part
**
*Part, name="continuity plate"
*Node
      1,         -50.,        -8.75,   1.67999995
      2,         -50.,        -4.75,   1.67999995
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*Element, type=C3D8R
 1,  28,  29,  38,  37,   1,   2,  11,  10
 2,  29,  30,  39,  38,   2,   3,  12,  11
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*Nset, nset=_PickedSet2, internal, generate
   1,  162,    1
*Elset, elset=_PickedSet2, internal, generate
  1,  80,   1
** Section: ContinuityPlate
*Solid Section, elset=_PickedSet2, material=ContinuityPlateA572
,
*End Part
**
**
** ASSEMBLY
**
*Assembly, name=Assembly
**
*Instance, name="Column 36x24x2-1", part="Column 36x24x2"
          0.,           2.,           2.
          0.,           2.,           2., -1.00000001268805,           2.,           2., 89.9999992730282
*End Instance
**
*Instance, name="continuity plate-1", part="continuity plate"
      -25.25,       134.65,         -40.
      -25.25,       134.65,         -40., -24.6726497308104, 135.22735026919, -40.5773502691896,         120.
*End Instance
**
*Instance, name="continuity plate-2", part="continuity plate"
      -25.25,        99.03,         -40.
      -25.25,        99.03,         -40., -24.6726497308104, 99.6073502691896, -40.5773502691896,         120.
*End Instance
**
*Instance, name="Beam W36x302-1", part="Beam W36x302"
        162.,       104.47, -8.15000000000001
        162.,       104.47, -8.15000000000001,         162., 103.469999987312, -8.15000000000001, 89.9999992730282
*End Instance
**
*Instance, name="Strengthen bar-1", part="Strengthen bar"
       -5.75,       133.65,         -10.
*End Instance
**
*Instance, name="Strengthen bar-2", part="Strengthen bar"
       -5.75,       130.47,         -10.
*End Instance
**
*Instance, name="Strengthen bar-3", part="Strengthen bar"
       -5.75,        98.03,         -10.
*End Instance
**
*Instance, name="Strengthen bar-4", part="Strengthen bar"
       -5.75,        94.85,         -10.
*End Instance
**
*Instance, name="Strengthen bar-5", part="Strengthen bar"
      -34.75,        98.03,         -10.
*End Instance
**
*Instance, name="Strengthen bar-6", part="Strengthen bar"
      -34.75,        94.85,         -10.
*End Instance
**
*Instance, name="Strengthen bar-7", part="Strengthen bar"
      -34.75,       133.65,         -10.
*End Instance
**
*Instance, name="Strengthen bar-8", part="Strengthen bar"
      -34.75,       130.47,         -10.
*End Instance
**
*Instance, name=RHSpart-1, part=RHSpart
      23.375,       134.65,   -33.556439
      23.375,       134.65,   -33.556439, 24.3750000126881,       134.65,   -33.556439, 89.9999992730282
*End Instance
**
*Instance, name=RHSpart-2, part=RHSpart
       23.38,       132.97,    33.556439
       23.38,       132.97,    33.556439, 22.3799999873119,       132.97,    33.556439, 89.9999992730282
*End Instance
**
*Instance, name=RHSpart-3, part=RHSpart
      23.375,        99.03,   -33.556439
      23.375,        99.03,   -33.556439, 24.3750000126881,        99.03,   -33.556439, 89.9999992730282
*End Instance
**
*Instance, name=RHSpart-4, part=RHSpart
       23.38,        97.35,    33.556439
       23.38,        97.35,    33.556439, 22.3799999873119,        97.35,    33.556439, 89.9999992730282
*End Instance
**
*Node
      1,         162.,         116.,           0.
*Node
      2,         -18.,           2.,           0.
*Node
      3,           0.,         116.,           0.
*Nset, nset="BC Bottom left", instance="Column 36x24x2-1"
   1,   4,   9,  14, 257, 258, 259, 260
*Elset, elset="BC Bottom left", instance="Column 36x24x2-1"
    1,   49,   50,   51,   52,   53,  289, 1393, 1397, 1398, 1399, 1400, 1401, 1417
*Nset, nset="BC Top", instance="Column 36x24x2-1"
   7,   8,  12,  15, 265, 266, 267, 268
*Elset, elset="BC Top", instance="Column 36x24x2-1"
   48,  284,  285,  286,  287,  288,  336, 1597, 1601, 1602, 1603, 1604, 1605, 1677
*Nset, nset=BeamFlange, instance="Beam W36x302-1"
    1,    2,    3,    4,    5,    6
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*Nset, nset="Column bottom", instance="Column 36x24x2-1"
  31,  32,  33,  34,  35,  36
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*Elset, elset="Column bottom", instance="Column 36x24x2-1"
 1396, 1412, 1413, 1414, 1415, 1416
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*Nset, nset=Load, instance="Beam W36x302-1"
   83,   84,   85,   86,   87,   88
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*Elset, elset=Load, instance="Beam W36x302-1"
  799,  800,  801,  802,  803,  804
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*Nset, nset=m_Set-5
 2,
*Nset, nset=_PickedSet33, internal
 2,
*Nset, nset=_PickedSet55, internal
 1,
*Nset, nset=_PickedSet56, internal, instance="Beam W36x302-1"
   83,   84,   85,   86,   87,   88
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*Elset, elset=_PickedSet56, internal, instance="Beam W36x302-1"
  799,  800,  801,  802,  803,  804
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*Nset, nset=_PickedSet57, internal
 1,
*Nset, nset=_PickedSet61, internal
 3,
*Nset, nset=_PickedSet63, internal
 3,
*Nset, nset=_PickedSet78, internal
 1,
*Nset, nset=_PickedSet79, internal, instance="Beam W36x302-1"
  115,  116,  118,  119,  121,  122
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*Elset, elset=_PickedSet79, internal, instance="Beam W36x302-1"
 2177, 2178, 2179, 2180, 2185, 2186
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*Nset, nset=_PickedSet80, internal
 1,
*Nset, nset=_PickedSet82, internal
 3,
*Nset, nset=_PickedSet83, internal, instance="Beam W36x302-1"
  115,  116,  118,  119,  121,  122
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*Elset, elset=_PickedSet83, internal, instance="Beam W36x302-1"
 2177, 2178, 2179, 2180, 2185, 2186
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*Nset, nset=_PickedSet84, internal, instance="Column 36x24x2-1", generate
    1,  3420,     1
*Nset, nset=_PickedSet84, internal, instance="continuity plate-1", generate
   1,  162,    1
*Nset, nset=_PickedSet84, internal, instance="continuity plate-2", generate
   1,  162,    1
*Nset, nset=_PickedSet84, internal, instance="Strengthen bar-1", generate
  1,  24,   1
*Nset, nset=_PickedSet84, internal, instance="Strengthen bar-3", generate
  1,  24,   1
*Nset, nset=_PickedSet84, internal, instance="Strengthen bar-7", generate
  1,  24,   1
*Nset, nset=_PickedSet84, internal, instance="Strengthen bar-5", generate
  1,  24,   1
*Nset, nset=_PickedSet84, internal, instance="Strengthen bar-2", generate
  1,  24,   1
*Nset, nset=_PickedSet84, internal, instance="Strengthen bar-4", generate
  1,  24,   1
*Nset, nset=_PickedSet84, internal, instance="Strengthen bar-8", generate
  1,  24,   1
*Nset, nset=_PickedSet84, internal, instance="Strengthen bar-6", generate
  1,  24,   1
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*Elset, elset=_BeamEndFlange_S3, internal, instance="Beam W36x302-1", generate
 2240,  2258,     2
*Elset, elset=_BeamEndFlange_S4, internal, instance="Beam W36x302-1", generate
 2193,  2211,     2
*Elset, elset=_BeamEndFlange_S6, internal, instance="Beam W36x302-1", generate
 2223,  2237,     2
*Elset, elset=_BeamEndFlange_S5, internal, instance="Beam W36x302-1"
 2177, 2178, 2179, 2180, 2185, 2186, 2187, 2188
*Surface, type=ELEMENT, name=BeamEndFlange
_BeamEndFlange_S3, S3
_BeamEndFlange_S4, S4
_BeamEndFlange_S6, S6
_BeamEndFlange_S5, S5
*Elset, elset="_Column face_S5", internal, instance="Column 36x24x2-1"
  961,  962,  963,  964,  965,  966
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*Elset, elset="_Column face_S6", internal, instance="Column 36x24x2-1", generate
 721,  960,    1
*Surface, type=ELEMENT, name="Column face"
"_Column face_S5", S5
"_Column face_S6", S6
*Elset, elset="_Column inner_S4", internal, instance="Column 36x24x2-1"
  49,  50,  51,  52,  53,  54
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*Elset, elset="_Column inner_S5", internal, instance="Column 36x24x2-1", generate
 1009,  1392,     1
*Surface, type=ELEMENT, name="Column inner"
"_Column inner_S4", S4
"_Column inner_S5", S5
*Elset, elset="_Continuity plate to SB_S3", internal, instance="continuity plate-1"
  1,  2,  3,  4,  5,  6
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*Elset, elset="_Continuity plate to SB_S3", internal, instance="continuity plate-2"
  1,  2,  3,  4,  5,  6
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*Elset, elset="_Continuity plate to SB_S5", internal, instance="continuity plate-1"
  9, 10, 11, 12, 13, 14
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*Elset, elset="_Continuity plate to SB_S5", internal, instance="continuity plate-2"
  9, 10, 11, 12, 13, 14
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*Surface, type=ELEMENT, name="Continuity plate to SB"
"_Continuity plate to SB_S3", S3
"_Continuity plate to SB_S5", S5
*Elset, elset="_Continuity plate weld_S1", internal, instance="continuity plate-1", generate
 65,  80,   1
*Elset, elset="_Continuity plate weld_S1", internal, instance="continuity plate-2", generate
 65,  80,   1
*Elset, elset="_Continuity plate weld_S6", internal, instance="continuity plate-1", generate
  1,  73,   8
*Elset, elset="_Continuity plate weld_S6", internal, instance="continuity plate-2", generate
  1,  73,   8
*Elset, elset="_Continuity plate weld_S2", internal, instance="continuity plate-1", generate
  1,  16,   1
*Elset, elset="_Continuity plate weld_S2", internal, instance="continuity plate-2", generate
  1,  16,   1
*Elset, elset="_Continuity plate weld_S4", internal, instance="continuity plate-1", generate
  8,  80,   8
*Elset, elset="_Continuity plate weld_S4", internal, instance="continuity plate-2", generate
  8,  80,   8
*Surface, type=ELEMENT, name="Continuity plate weld"
"_Continuity plate weld_S1", S1
"_Continuity plate weld_S6", S6
"_Continuity plate weld_S2", S2
"_Continuity plate weld_S4", S4
*Elset, elset=_RHSbeamSlave_S6, internal, instance=RHSpart-1
  3,  7, 21, 25
*Elset, elset=_RHSbeamSlave_S6, internal, instance=RHSpart-2
  3,  7, 21, 25
*Elset, elset=_RHSbeamSlave_S6, internal, instance=RHSpart-3
  3,  7, 21, 25
*Elset, elset=_RHSbeamSlave_S6, internal, instance=RHSpart-4
  3,  7, 21, 25
*Elset, elset=_RHSbeamSlave_S3, internal, instance=RHSpart-1
  4, 18, 22, 36
*Elset, elset=_RHSbeamSlave_S3, internal, instance=RHSpart-2
  4, 18, 22, 36
*Elset, elset=_RHSbeamSlave_S3, internal, instance=RHSpart-3
  4, 18, 22, 36
*Elset, elset=_RHSbeamSlave_S3, internal, instance=RHSpart-4
  4, 18, 22, 36
*Elset, elset=_RHSbeamSlave_S5, internal, instance=RHSpart-1
  5,  6, 15, 23, 24, 33
*Elset, elset=_RHSbeamSlave_S5, internal, instance=RHSpart-2
  5,  6, 15, 23, 24, 33
*Elset, elset=_RHSbeamSlave_S5, internal, instance=RHSpart-3
  5,  6, 15, 23, 24, 33
*Elset, elset=_RHSbeamSlave_S5, internal, instance=RHSpart-4
  5,  6, 15, 23, 24, 33
*Elset, elset=_RHSbeamSlave_S4, internal, instance=RHSpart-1
  8, 16, 17, 26, 34, 35
*Elset, elset=_RHSbeamSlave_S4, internal, instance=RHSpart-2
  8, 16, 17, 26, 34, 35
*Elset, elset=_RHSbeamSlave_S4, internal, instance=RHSpart-3
  8, 16, 17, 26, 34, 35
*Elset, elset=_RHSbeamSlave_S4, internal, instance=RHSpart-4
  8, 16, 17, 26, 34, 35
*Surface, type=ELEMENT, name=RHSbeamSlave
_RHSbeamSlave_S6, S6
_RHSbeamSlave_S3, S3
_RHSbeamSlave_S4, S4
_RHSbeamSlave_S5, S5
*Elset, elset=_RHSbeamSurface_S6, internal, instance="Beam W36x302-1"
 201, 205, 209, 213, 217, 221
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*Elset, elset=_RHSbeamSurface_S5, internal, instance="Beam W36x302-1"
  17,  18,  25,  26,  33,  34
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*Surface, type=ELEMENT, name=RHSbeamSurface
_RHSbeamSurface_S6, S6
_RHSbeamSurface_S5, S5
*Elset, elset=_StrengthenBar_S4, internal, instance="Strengthen bar-1", generate
 1,  5,  1
*Elset, elset=_StrengthenBar_S4, internal, instance="Strengthen bar-3", generate
 1,  5,  1
*Elset, elset=_StrengthenBar_S4, internal, instance="Strengthen bar-7", generate
 1,  5,  1
*Elset, elset=_StrengthenBar_S4, internal, instance="Strengthen bar-5", generate
 1,  5,  1
*Elset, elset=_StrengthenBar_S6, internal, instance="Strengthen bar-2", generate
 1,  5,  1
*Elset, elset=_StrengthenBar_S6, internal, instance="Strengthen bar-4", generate
 1,  5,  1
*Elset, elset=_StrengthenBar_S6, internal, instance="Strengthen bar-8", generate
 1,  5,  1
*Elset, elset=_StrengthenBar_S6, internal, instance="Strengthen bar-6", generate
 1,  5,  1
*Surface, type=ELEMENT, name=StrengthenBar
_StrengthenBar_S4, S4
_StrengthenBar_S6, S6
*Elset, elset="_beam weld_S3", internal, instance="Beam W36x302-1", generate
 2240,  2258,     2
*Elset, elset="_beam weld_S4", internal, instance="Beam W36x302-1"
 2193, 2195, 2197, 2199, 2201, 2203
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*Elset, elset="_beam weld_S6", internal, instance="Beam W36x302-1", generate
 2223,  2237,     2
*Elset, elset="_beam weld_S2", internal, instance="Beam W36x302-1"
 2280,
*Elset, elset="_beam weld_S5", internal, instance="Beam W36x302-1"
 2177, 2178, 2179, 2180, 2185, 2186, 2187, 2188
*Surface, type=ELEMENT, name="beam weld"
"_beam weld_S3", S3
"_beam weld_S4", S4
"_beam weld_S6", S6
"_beam weld_S2", S2
"_beam weld_S5", S5
** Constraint: Beam pin end
*Rigid Body, ref node=_PickedSet55, pin nset=_PickedSet56
** Constraint: BeamEndFlangeFix
*Rigid Body, ref node=_PickedSet82, pin nset=_PickedSet83
** Constraint: RHSpart
*Tie, name=RHSpart, adjust=yes
RHSbeamSlave, RHSbeamSurface
*End Assembly
*Amplitude, name="Cyclic loading"
             0.,              0.,              1.,          0.0675,              2.,           0.135,              3.,          0.2025
             4.,            0.27,              5.,          0.3375,              6.,           0.405,              7.,          0.4725
             8.,            0.54,              9.,          0.6075,             10.,           0.675,             11.,            0.54
            12.,           0.405,             13.,            0.27,             14.,           0.135,             15.,              0.
            16.,          -0.135,             17.,           -0.27,             18.,          -0.405,             19.,           -0.54
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           680.,           -10.8
**
** MATERIALS
**
*Material, name=BeamA992
*Elastic
29000., 0.3
*Plastic, hardening=COMBINED, datatype=PARAMETERS, number backstresses=1
 59.5,490., 20.
*Cyclic Hardening, parameters
 59.5,13.,12.
*Material, name=ColumnA572
*Elastic
29000., 0.3
*Plastic, hardening=COMBINED, datatype=PARAMETERS, number backstresses=1
 59.8, 481.5,  16.9
*Cyclic Hardening, parameters
 59.8, 18.9, 7.69
*Material, name=ContinuityPlateA572
*Elastic
29000., 0.3
*Plastic, hardening=COMBINED, datatype=PARAMETERS, number backstresses=1
62., 481.5,  16.9
*Cyclic Hardening, parameters
62., 18.9, 7.69
*Material, name=StrengthenBar
*Elastic
29000., 0.3
*Plastic, hardening=COMBINED, datatype=PARAMETERS, number backstresses=1
62., 481.5,  16.9
*Cyclic Hardening, parameters
62., 18.9, 7.69
** ----------------------------------------------------------------
**
** STEP: Buckling step
**
*Step, name="Buckling step", nlgeom=NO, perturbation
*Buckle, eigensolver=lanczos
150, , , ,
**
** BOUNDARY CONDITIONS
**
** Name: BC-BeamEndPin Type: 変位/回転
*Boundary, op=NEW, load case=1
_PickedSet78, 3, 3
_PickedSet78, 4, 4
*Boundary, op=NEW, load case=2
_PickedSet78, 3, 3
_PickedSet78, 4, 4
** Name: BC-BeamEndTmp Type: 変位/回転
*Boundary, op=NEW, load case=1
_PickedSet63, 1, 1
_PickedSet63, 2, 2
_PickedSet63, 3, 3
_PickedSet63, 4, 4
_PickedSet63, 6, 6
*Boundary, op=NEW, load case=2
_PickedSet63, 1, 1
_PickedSet63, 2, 2
_PickedSet63, 3, 3
_PickedSet63, 4, 4
_PickedSet63, 6, 6
** Name: ColumnFix Type: 対称/反対称/完全固定
*Boundary, op=NEW, load case=1
_PickedSet84, ENCASTRE
*Boundary, op=NEW, load case=2
_PickedSet84, ENCASTRE
**
** LOADS
**
** Name: Reference-Load   Type: Concentrated force
*Cload
_PickedSet57, 1, -1.
_PickedSet57, 2, 0.
_PickedSet57, 3, 0.
**
** OUTPUT REQUESTS
**
*Restart, write, frequency=0
**
** FIELD OUTPUT: F-Output-1
**
*Output, field, variable=PRESELECT
*NODE FILE, GLOBAL=NO,
MODE=136, LAST MODE=138
U
*End Step
